2024-03-08
오후 01:42

$PROB Zolpidem PK
;; 1 Depot - 1 Comp
;; ETA (VC, CL) : Dependent

$INPUT ID TIME AMT RATE=DROP DV MDV EVID CMT DVID SEX WT

$DATA ..//PK_Zolpidem_MFDS_COV_1.csv IGNORE=@

$SUBROUTINES ADVAN14 TOL=5

$MODEL

 COMP(Depot1, DEFDOSE)
 COMP(Central, DEFOBS)

$PK

 V2     = THETA(1)*EXP(ETA(1))
 CL     = THETA(2)*EXP(ETA(2))
 ALPHA  = THETA(3)*EXP(ETA(3))
 BETA   = THETA(4)*EXP(ETA(4))
 COEF   = THETA(5)*EXP(ETA(5))

 ALAG1  = THETA(6)*EXP(ETA(6))

 K      = CL/V2

 S2     = V2/1000

$DES

  WB     = COEF * (1-EXP(-(ALPHA*T)**BETA))

 DADT(1) = -WB*A(1)
 DADT(2) = WB*A(1) - K*A(2)

$ERROR
  IPRED   = F
  W       = SQRT(THETA(7)**2 + THETA(8)**2 * IPRED**2)
  IRES    = DV - IPRED
  IWRES   = IRES / W
  Y       = IPRED + W * EPS(1)

$THETA
  (0, 60)          ;1, KA
  (0, 15)        ;2, VC
  (0, 1)          ;3, CL
  (0, 1)          ;3, CL
  (0, 1)        ;4, ALAG1
  (0, 0.3)

   0.000001 FIX   ;5, Additive Residual Variability
  (0, 0.3)       ;6, Proportional Residual Variability
$OMEGA
  1        ;1, KA

$OMEGA BLOCK(2)
  0.02       ;2, VC
  0.01 0.1   ;3, CL

$OMEGA
0.01
0 FIX
0 FIX

$SIGMA 1 FIX

$ESTIMATION PRINT=10 MAXEVALS=9999 METHOD=COND INTER SLOW NOABORT
$COVARIANCE PRINT=E MATRIX=S

$TABLE ID TIME AMT DV MDV EVID CMT DVID SEX WT IWRES IRES IPRED CWRES          NOPRINT ONEHEADER          FILE=sdtab100
$TABLE ID  V2 CL ALPHA BETA COEF ALAG1                                         NOPRINT ONEHEADER NOAPPEND FILE=patab100
$TABLE ID  SEX                                                                 NOPRINT ONEHEADER NOAPPEND FILE=catab100

NM-TRAN MESSAGES
 WARNINGS AND ERRORS (IF ANY) FOR PROBLEM    1
 (WARNING  2) NM-TRAN INFERS THAT THE DATA ARE POPULATION.
Note: Analytical 2nd Derivatives are constructed in FSUBS but are never used.
      You may insert $ABBR DERIV2=NO after the first $PROB to save FSUBS construction and compilation time

1NONLINEAR MIXED EFFECTS MODEL PROGRAM (NONMEM) VERSION 7.5.1
 ORIGINALLY DEVELOPED BY STUART BEAL, LEWIS SHEINER, AND ALISON BOECKMANN
 CURRENT DEVELOPERS ARE ROBERT BAUER, ICON DEVELOPMENT SOLUTIONS,
 AND ALISON BOECKMANN. IMPLEMENTATION, EFFICIENCY, AND STANDARDIZATION
 PERFORMED BY NOUS INFOSYSTEMS.
 PROBLEM NO.:         1
 Zolpidem PK
 TOT. NO. OF OBS RECS:      273
 TOT. NO. OF INDIVIDUALS:       23
 GENERAL NONLINEAR KINETICS MODEL WITH STIFF/NONSTIFF EQUATIONS (CVODES, ADVAN14)
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 #TBLN:      1
 #METH: First Order Conditional Estimation with Interaction
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
 #TERM:
0MINIMIZATION TERMINATED
 DUE TO ROUNDING ERRORS (ERROR=134)
 NO. OF FUNCTION EVALUATIONS USED:     2217
 NO. OF SIG. DIGITS IN FINAL EST.:  3.0

 ETABAR IS THE ARITHMETIC MEAN OF THE ETA-ESTIMATES,
 AND THE P-VALUE IS GIVEN FOR THE NULL HYPOTHESIS THAT THE TRUE MEAN IS 0.

 ETABAR:        -7.6687E-03  2.3303E-03  5.6776E-03  2.0348E-03  0.0000E+00  0.0000E+00
 SE:             3.2243E-02  5.3725E-02  2.1571E-01  1.6703E-03  0.0000E+00  0.0000E+00
 N:                      23          23          23          23          23          23

 P VAL.:         8.1200E-01  9.6540E-01  9.7900E-01  2.2315E-01  1.0000E+00  1.0000E+00

 ETASHRINKSD(%)  1.6590E+01  4.4102E+00  7.2611E+00  9.2539E+01  0.0000E+00  0.0000E+00
 ETASHRINKVR(%)  3.0427E+01  8.6260E+00  1.3995E+01  9.9443E+01  0.0000E+00  0.0000E+00
 EBVSHRINKSD(%)  1.7244E+01  4.2547E+00  7.3922E+00  9.1417E+01  0.0000E+00  0.0000E+00
 EBVSHRINKVR(%)  3.1515E+01  8.3284E+00  1.4238E+01  9.9263E+01  0.0000E+00  0.0000E+00
 RELATIVEINF(%)  6.7617E+01  1.0854E+01  1.7878E-01  7.6415E-02  0.0000E+00  0.0000E+00
 EPSSHRINKSD(%)  1.0239E+01
 EPSSHRINKVR(%)  1.9430E+01


 TOTAL DATA POINTS NORMALLY DISTRIBUTED (N):          273
 N*LOG(2PI) CONSTANT TO OBJECTIVE FUNCTION:    501.74043912975128
 OBJECTIVE FUNCTION VALUE WITHOUT CONSTANT:    1216.0431844419766
 OBJECTIVE FUNCTION VALUE WITH CONSTANT:       1717.7836235717277
 REPORTED OBJECTIVE FUNCTION DOES NOT CONTAIN CONSTANT

 TOTAL EFFECTIVE ETAS (NIND*NETA):                            92


 #TERE:
 Elapsed estimation  time in seconds:  1690.62
 Elapsed postprocess time in seconds:     0.81

 ********************               FIRST ORDER CONDITIONAL ESTIMATION WITH INTERACTION              ********************
 #OBJT:**************                       MINIMUM VALUE OF OBJECTIVE FUNCTION                      ********************
 #OBJV:********************************************     1216.043       **************************************************

 ********************               FIRST ORDER CONDITIONAL ESTIMATION WITH INTERACTION              ********************
 ********************                             FINAL PARAMETER ESTIMATE                           ********************

 THETA - VECTOR OF FIXED EFFECTS PARAMETERS   *********
         TH 1      TH 2      TH 3      TH 4      TH 5      TH 6      TH 7      TH 8
         6.12E+01  1.59E+01  1.78E+00  6.54E-01  1.20E+01  3.06E-02  1.00E-06  3.25E-01

 OMEGA - COV MATRIX FOR RANDOM EFFECTS - ETAS  ********
         ETA1      ETA2      ETA3      ETA4      ETA5      ETA6
 ETA1
+        3.44E-02
 ETA2
+        0.00E+00  7.27E-02
 ETA3
+        0.00E+00  2.89E-01  1.24E+00
 ETA4
+        0.00E+00  0.00E+00  0.00E+00  1.15E-02
 ETA5
+        0.00E+00  0.00E+00  0.00E+00  0.00E+00  0.00E+00
 ETA6
+        0.00E+00  0.00E+00  0.00E+00  0.00E+00  0.00E+00  0.00E+00

 SIGMA - COV MATRIX FOR RANDOM EFFECTS - EPSILONS  ****
         EPS1
 EPS1
+        1.00E+00

 OMEGA - CORR MATRIX FOR RANDOM EFFECTS - ETAS  *******
         ETA1      ETA2      ETA3      ETA4      ETA5      ETA6
 ETA1
+        1.85E-01
 ETA2
+        0.00E+00  2.70E-01
 ETA3
+        0.00E+00  9.61E-01  1.12E+00
 ETA4
+        0.00E+00  0.00E+00  0.00E+00  1.07E-01
 ETA5
+        0.00E+00  0.00E+00  0.00E+00  0.00E+00  0.00E+00
 ETA6
+        0.00E+00  0.00E+00  0.00E+00  0.00E+00  0.00E+00  0.00E+00

 SIGMA - CORR MATRIX FOR RANDOM EFFECTS - EPSILONS  ***
         EPS1
 EPS1
+        1.00E+00
 Elapsed finaloutput time in seconds:     0.09
 #CPUT: Total CPU Time in Seconds,      234.828
