2024-09-20
오전 11:51
;; 1. Based on: 1
;; 2. Description: SB vitreous with IIV CL V
$PROBLEM SB vitreous with IIV CL V

$INPUT ID	TIME	DV	MDV	CMT	AMT	GROUP=SKIP	LEFT	SITE	DAY	WEEK	ID2=SKIP	IDD=SKIP

$DATA SB.csv IGNORE=@

$SUBROUTINES ADVAN1 TRANS2

$PK
 CL   = THETA(1)*EXP(ETA(1))
 V    = THETA(2)*EXP(ETA(2))

 S1   = V/1000   ; dose: mg   V: ng/mL

$ERROR

  IPRED   = F
  W       = SQRT(THETA(3)**2 + THETA(4)**2 * IPRED**2)
  IRES    = DV - IPRED
  IWRES   = IRES / W
  Y       = IPRED + W * EPS(1)


$THETA
 (0,0.000002)      ; CL
 (0,0.0005)        ; V
 0.000001  FIX  ; Additive Residual Variability
 (0,0.1)        ; Proportional Residual Variability
$OMEGA
0.01
0.01

$SIGMA 1 FIX 1 FIX

$COVARIANCE PRINT = E

$ESTIMATION NOABORT MAXEVALS=9999 METHOD=1 INTER PRINT = 10

$TABLE ID TIME DV MDV CMT AMT LEFT SITE DAY WEEK IWRES IRES IPRED CWRES                                          NOPRINT ONEHEADER          FILE=sdtab2
$TABLE ID CL V ETA1 ETA2                                                                                         NOPRINT ONEHEADER NOAPPEND FILE=patab2

NM-TRAN MESSAGES
 WARNINGS AND ERRORS (IF ANY) FOR PROBLEM    1
 (WARNING  2) NM-TRAN INFERS THAT THE DATA ARE POPULATION.
Note: Analytical 2nd Derivatives are constructed in FSUBS but are never used.
      You may insert $ABBR DERIV2=NO after the first $PROB to save FSUBS construction and compilation time

1NONLINEAR MIXED EFFECTS MODEL PROGRAM (NONMEM) VERSION 7.5.1
 ORIGINALLY DEVELOPED BY STUART BEAL, LEWIS SHEINER, AND ALISON BOECKMANN
 CURRENT DEVELOPERS ARE ROBERT BAUER, ICON DEVELOPMENT SOLUTIONS,
 AND ALISON BOECKMANN. IMPLEMENTATION, EFFICIENCY, AND STANDARDIZATION
 PERFORMED BY NOUS INFOSYSTEMS.
 PROBLEM NO.:         1
 SB vitreous with IIV CL V
 TOT. NO. OF OBS RECS:       39
 TOT. NO. OF INDIVIDUALS:       40
 ONE COMPARTMENT MODEL (ADVAN1)
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 #TBLN:      1
 #METH: First Order Conditional Estimation with Interaction
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
 #TERM:
0MINIMIZATION TERMINATED
 DUE TO ROUNDING ERRORS (ERROR=134)
 NO. OF FUNCTION EVALUATIONS USED:     1572
 NO. OF SIG. DIGITS UNREPORTABLE
0PARAMETER ESTIMATE IS NEAR ITS BOUNDARY

 ETABAR IS THE ARITHMETIC MEAN OF THE ETA-ESTIMATES,
 AND THE P-VALUE IS GIVEN FOR THE NULL HYPOTHESIS THAT THE TRUE MEAN IS 0.

 ETABAR:         4.3283E-04 -2.1939E-07
 SE:             1.5547E-02  1.2704E-06
 N:                      39          39

 P VAL.:         9.7779E-01  8.6289E-01

 ETASHRINKSD(%)  1.0000E-10  9.9207E+01
 ETASHRINKVR(%)  1.0000E-10  9.9994E+01
 EBVSHRINKSD(%)  3.6605E-03  9.9184E+01
 EBVSHRINKVR(%)  7.3209E-03  9.9993E+01
 RELATIVEINF(%)  2.4559E+00  1.6344E-04
 EPSSHRINKSD(%)  9.9699E+01  1.0000E+02
 EPSSHRINKVR(%)  9.9999E+01  1.0000E+02


 TOTAL DATA POINTS NORMALLY DISTRIBUTED (N):           39
 N*LOG(2PI) CONSTANT TO OBJECTIVE FUNCTION:    71.677205589964473
 OBJECTIVE FUNCTION VALUE WITHOUT CONSTANT:    597.45877953454078
 OBJECTIVE FUNCTION VALUE WITH CONSTANT:       669.13598512450528
 REPORTED OBJECTIVE FUNCTION DOES NOT CONTAIN CONSTANT

 TOTAL EFFECTIVE ETAS (NIND*NETA):                            78


 #TERE:
 Elapsed estimation  time in seconds:     0.79
 Elapsed postprocess time in seconds:     0.00

 ********************               FIRST ORDER CONDITIONAL ESTIMATION WITH INTERACTION              ********************
 #OBJT:**************                       MINIMUM VALUE OF OBJECTIVE FUNCTION                      ********************
 #OBJV:********************************************      597.459       **************************************************

 ********************               FIRST ORDER CONDITIONAL ESTIMATION WITH INTERACTION              ********************
 ********************                             FINAL PARAMETER ESTIMATE                           ********************

 THETA - VECTOR OF FIXED EFFECTS PARAMETERS   *********
         TH 1      TH 2      TH 3      TH 4
         6.07E-06  9.01E-04  1.00E-06  1.00E-03

 OMEGA - COV MATRIX FOR RANDOM EFFECTS - ETAS  ********
         ETA1      ETA2
 ETA1
+        9.43E-03
 ETA2
+        0.00E+00  1.00E-06

 SIGMA - COV MATRIX FOR RANDOM EFFECTS - EPSILONS  ****
         EPS1      EPS2
 EPS1
+        1.00E+00
 EPS2
+        0.00E+00  1.00E+00

 OMEGA - CORR MATRIX FOR RANDOM EFFECTS - ETAS  *******
         ETA1      ETA2
 ETA1
+        9.71E-02
 ETA2
+        0.00E+00  1.00E-03

 SIGMA - CORR MATRIX FOR RANDOM EFFECTS - EPSILONS  ***
         EPS1      EPS2
 EPS1
+        1.00E+00
 EPS2
+        0.00E+00  1.00E+00
 Elapsed finaloutput time in seconds:     0.03
 #CPUT: Total CPU Time in Seconds,        0.953
