;; 1. Based on: 1
;; 2. Description: SB vitreous with IIV CL V combined error
$PROBLEM SB vitreous with IIV CL V combined error

$INPUT ID	TIME	DV	MDV	CMT	AMT	GROUP=SKIP	LEFT	SITE	DAY	WEEK	ID2=SKIP	IDD=SKIP


$DATA SB.csv IGNORE=@

$SUBROUTINES ADVAN1 TRANS2

$PK
 CL   = THETA(1)*EXP(ETA(1))
 V    = THETA(2)*EXP(ETA(2))

 S1   = V   ; dose: mg   V: ng/mL

$ERROR

  IPRED   = F
  W       = SQRT(THETA(3)**2 + THETA(4)**2 * IPRED**2)
  IRES    = DV - IPRED
  IWRES   = IRES / W
  Y       = IPRED + W * EPS(1)


$THETA
 (0,0.000004)      ; CL
 (0,0.0007)         ; V
 100  ; Additive Residual Variability
 (0,0.1)        ; Proportional Residual Variability
$OMEGA
0.1
0.1

$SIGMA 1 FIX 1 FIX

$COVARIANCE PRINT = E

$ESTIMATION NOABORT MAXEVALS=9999 METHOD=1 INTER PRINT = 10


$TABLE ID TIME DV MDV CMT AMT LEFT SITE DAY WEEK IWRES IRES IPRED CWRES                                          NOPRINT ONEHEADER          FILE=sdtab3
$TABLE ID CL V ETA1 ETA2                                                                                         NOPRINT ONEHEADER NOAPPEND FILE=patab3
