2024-09-20
오후 12:46
;; 1. Based on: 1
$PROBLEM SB vitreous with IIV CL Vwithout error
;; 2. Description: SB vitreous with IIV V without error

$INPUT ID	TIME	DV	MDV	CMT	AMT	GROUP=SKIP	LEFT	SITE	DAY	WEEK	ID2=SKIP	IDD=SKIP

$DATA SB.csv IGNORE=@

$SUBROUTINES ADVAN1 TRANS2

$PK
 CL   = THETA(1)*EXP(ETA(1))
 V    = THETA(2)*EXP(ETA(2))

 S1   = V/1000   ; dose: mg   V: ng/mL

$ERROR

  IPRED   = F
  W       = SQRT(THETA(3)**2 + THETA(4)**2 * IPRED**2)
  IRES    = DV - IPRED
  IWRES   = IRES / W
  Y       = IPRED + W * EPS(1)


$THETA
 (0,0.000004)      ; CL
 (0,0.0004)         ; V
 0.000001  FIX  ; Additive Residual Variability
 0.000001 FIX        ; Proportional Residual Variability
$OMEGA
0 FIX
0.01

$SIGMA 1 FIX

$COVARIANCE PRINT = E

$ESTIMATION NOABORT MAXEVALS=9999 METHOD=1 INTER PRINT = 10

$TABLE ID TIME DV MDV CMT AMT LEFT SITE DAY WEEK IWRES IRES IPRED CWRES                                          NOPRINT ONEHEADER          FILE=sdtab7
$TABLE ID CL V ETA1 ETA2                                                                                        NOPRINT ONEHEADER NOAPPEND FILE=patab7

NM-TRAN MESSAGES
 WARNINGS AND ERRORS (IF ANY) FOR PROBLEM    1
 (WARNING  2) NM-TRAN INFERS THAT THE DATA ARE POPULATION.
Note: Analytical 2nd Derivatives are constructed in FSUBS but are never used.
      You may insert $ABBR DERIV2=NO after the first $PROB to save FSUBS construction and compilation time

1NONLINEAR MIXED EFFECTS MODEL PROGRAM (NONMEM) VERSION 7.5.1
 ORIGINALLY DEVELOPED BY STUART BEAL, LEWIS SHEINER, AND ALISON BOECKMANN
 CURRENT DEVELOPERS ARE ROBERT BAUER, ICON DEVELOPMENT SOLUTIONS,
 AND ALISON BOECKMANN. IMPLEMENTATION, EFFICIENCY, AND STANDARDIZATION
 PERFORMED BY NOUS INFOSYSTEMS.
 PROBLEM NO.:         1
 SB vitreous with IIV CL Vwithout error
 TOT. NO. OF OBS RECS:       39
 TOT. NO. OF INDIVIDUALS:       40
 ONE COMPARTMENT MODEL (ADVAN1)
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 #TBLN:      1
 #METH: First Order Conditional Estimation with Interaction
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
 #TERM:
0MINIMIZATION SUCCESSFUL
 HOWEVER, PROBLEMS OCCURRED WITH THE MINIMIZATION.
 REGARD THE RESULTS OF THE ESTIMATION STEP CAREFULLY, AND ACCEPT THEM ONLY
 AFTER CHECKING THAT THE COVARIANCE STEP PRODUCES REASONABLE OUTPUT.
 NO. OF FUNCTION EVALUATIONS USED:     3284
 NO. OF SIG. DIGITS IN FINAL EST.:  3.0

 ETABAR IS THE ARITHMETIC MEAN OF THE ETA-ESTIMATES,
 AND THE P-VALUE IS GIVEN FOR THE NULL HYPOTHESIS THAT THE TRUE MEAN IS 0.

 ETABAR:         0.0000E+00  5.9234E-04
 SE:             0.0000E+00  2.0700E-02
 N:                      39          39

 P VAL.:         1.0000E+00  9.7717E-01

 ETASHRINKSD(%)  0.0000E+00  1.0000E-10
 ETASHRINKVR(%)  0.0000E+00  1.0000E-10
 EBVSHRINKSD(%)  0.0000E+00  5.1074E-10
 EBVSHRINKVR(%)  0.0000E+00  1.0215E-09
 RELATIVEINF(%)  0.0000E+00  1.0000E+02
 EPSSHRINKSD(%)  9.9997E+01
 EPSSHRINKVR(%)  1.0000E+02


 TOTAL DATA POINTS NORMALLY DISTRIBUTED (N):           39
 N*LOG(2PI) CONSTANT TO OBJECTIVE FUNCTION:    71.677205589964473
 OBJECTIVE FUNCTION VALUE WITHOUT CONSTANT:    601.40630028775058
 OBJECTIVE FUNCTION VALUE WITH CONSTANT:       673.08350587771508
 REPORTED OBJECTIVE FUNCTION DOES NOT CONTAIN CONSTANT

 TOTAL EFFECTIVE ETAS (NIND*NETA):                            39


 #TERE:
 Elapsed estimation  time in seconds:     1.56
 Elapsed covariance  time in seconds:     0.00
 Elapsed postprocess time in seconds:     0.02

 ********************               FIRST ORDER CONDITIONAL ESTIMATION WITH INTERACTION              ********************
 #OBJT:**************                       MINIMUM VALUE OF OBJECTIVE FUNCTION                      ********************
 #OBJV:********************************************      601.406       **************************************************

 ********************               FIRST ORDER CONDITIONAL ESTIMATION WITH INTERACTION              ********************
 ********************                             FINAL PARAMETER ESTIMATE                           ********************

 THETA - VECTOR OF FIXED EFFECTS PARAMETERS   *********
         TH 1      TH 2      TH 3      TH 4
         5.62E-06  8.19E-04  1.00E-06  1.00E-06

 OMEGA - COV MATRIX FOR RANDOM EFFECTS - ETAS  ********
         ETA1      ETA2
 ETA1
+        0.00E+00
 ETA2
+        0.00E+00  1.67E-02

 SIGMA - COV MATRIX FOR RANDOM EFFECTS - EPSILONS  ****
         EPS1
 EPS1
+        1.00E+00

 OMEGA - CORR MATRIX FOR RANDOM EFFECTS - ETAS  *******
         ETA1      ETA2
 ETA1
+        0.00E+00
 ETA2
+        0.00E+00  1.29E-01

 SIGMA - CORR MATRIX FOR RANDOM EFFECTS - EPSILONS  ***
         EPS1
 EPS1
+        1.00E+00

 ********************               FIRST ORDER CONDITIONAL ESTIMATION WITH INTERACTION              ********************
 ********************                            STANDARD ERROR OF ESTIMATE                          ********************

 THETA - VECTOR OF FIXED EFFECTS PARAMETERS   *********
         TH 1      TH 2      TH 3      TH 4
         4.29E-07  7.68E-05 ......... .........

 OMEGA - COV MATRIX FOR RANDOM EFFECTS - ETAS  ********
         ETA1      ETA2
 ETA1
+       .........
 ETA2
+       .........  4.70E-03

 SIGMA - COV MATRIX FOR RANDOM EFFECTS - EPSILONS  ****
         EPS1
 EPS1
+       .........

 OMEGA - CORR MATRIX FOR RANDOM EFFECTS - ETAS  *******
         ETA1      ETA2
 ETA1
+       .........
 ETA2
+       .........  1.82E-02

 SIGMA - CORR MATRIX FOR RANDOM EFFECTS - EPSILONS  ***
         EPS1
 EPS1
+       .........

 ********************               FIRST ORDER CONDITIONAL ESTIMATION WITH INTERACTION              ********************
 ********************                          COVARIANCE MATRIX OF ESTIMATE                         ********************

            TH 1      TH 2      TH 3      TH 4      OM11      OM12      OM22      SG11
 TH 1
+        1.84E-13
 TH 2
+        3.22E-11  5.90E-09
 TH 3
+       ......... ......... .........
 TH 4
+       ......... ......... ......... .........
 OM11
+       ......... ......... ......... ......... .........
 OM12
+       ......... ......... ......... ......... ......... .........
 OM22
+        9.60E-10  1.54E-07 ......... ......... ......... .........  2.21E-05
 SG11
+       ......... ......... ......... ......... ......... ......... ......... .........

 ********************               FIRST ORDER CONDITIONAL ESTIMATION WITH INTERACTION              ********************
 ********************                          CORRELATION MATRIX OF ESTIMATE                        ********************

            TH 1      TH 2      TH 3      TH 4      OM11      OM12      OM22      SG11
 TH 1
+        4.29E-07
 TH 2
+        9.79E-01  7.68E-05
 TH 3
+       ......... ......... .........
 TH 4
+       ......... ......... ......... .........
 OM11
+       ......... ......... ......... ......... .........
 OM12
+       ......... ......... ......... ......... ......... .........
 OM22
+        4.76E-01  4.26E-01 ......... ......... ......... .........  4.70E-03
 SG11
+       ......... ......... ......... ......... ......... ......... ......... .........
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
 ********************               FIRST ORDER CONDITIONAL ESTIMATION WITH INTERACTION              ********************
 ********************                      EIGENVALUES OF COR MATRIX OF ESTIMATE                     ********************

             1         2         3
         1.92E-02  6.87E-01  2.29E+00
 Elapsed finaloutput time in seconds:     0.05
 #CPUT: Total CPU Time in Seconds,        1.672
