2024-09-23
오전 10:30
;; 1. Based on: 1
;; 2. Description: SB aqueous 1comp with IIV CL
$PROBLEM SB aqueous 1comp with IIV CL

$INPUT ID	TIME	DV	MDV	CMT	AMT	GROUP=SKIP	LEFT	SITE	DAY	WEEK IDD=SKIP

$DATA aqueous.csv IGNORE=@

$SUBROUTINES ADVAN1 TRANS2

$PK
 CL   = THETA(1)*EXP(ETA(1))
 V    = THETA(2)*EXP(ETA(2))

 S1   = V/1000   ; dose: mg   V: ng/mL

$ERROR

  IPRED   = F
  W       = SQRT(THETA(3)**2 + THETA(4)**2 * IPRED**2)
  IRES    = DV - IPRED
  IWRES   = IRES / W
  Y       = IPRED + W * EPS(1)


$THETA
 (0,0.0002)      ; CL
 (0,0.004)        ; V
 0.000001  FIX  ; Additive Residual Variability
 (0,0.4)        ; Proportional Residual Variability
$OMEGA
0.01
0 FIX

$SIGMA 1 FIX

$COVARIANCE PRINT = E

$ESTIMATION NOABORT MAXEVALS=9999 METHOD=1 INTER PRINT = 10

$TABLE ID TIME DV MDV CMT AMT LEFT SITE DAY WEEK IWRES IRES IPRED CWRES                                          NOPRINT ONEHEADER          FILE=sdtab2
$TABLE ID CL V ETA1 ETA2                                                                                         NOPRINT ONEHEADER NOAPPEND FILE=patab2

NM-TRAN MESSAGES
 WARNINGS AND ERRORS (IF ANY) FOR PROBLEM    1
 (WARNING  2) NM-TRAN INFERS THAT THE DATA ARE POPULATION.
Note: Analytical 2nd Derivatives are constructed in FSUBS but are never used.
      You may insert $ABBR DERIV2=NO after the first $PROB to save FSUBS construction and compilation time

1NONLINEAR MIXED EFFECTS MODEL PROGRAM (NONMEM) VERSION 7.5.1
 ORIGINALLY DEVELOPED BY STUART BEAL, LEWIS SHEINER, AND ALISON BOECKMANN
 CURRENT DEVELOPERS ARE ROBERT BAUER, ICON DEVELOPMENT SOLUTIONS,
 AND ALISON BOECKMANN. IMPLEMENTATION, EFFICIENCY, AND STANDARDIZATION
 PERFORMED BY NOUS INFOSYSTEMS.
 PROBLEM NO.:         1
 SB aqueous 1comp with IIV CL
 TOT. NO. OF OBS RECS:       38
 TOT. NO. OF INDIVIDUALS:       40
 ONE COMPARTMENT MODEL (ADVAN1)
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 #TBLN:      1
 #METH: First Order Conditional Estimation with Interaction
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
 #TERM:
0MINIMIZATION SUCCESSFUL
 NO. OF FUNCTION EVALUATIONS USED:       52
 NO. OF SIG. DIGITS IN FINAL EST.:  3.8

 ETABAR IS THE ARITHMETIC MEAN OF THE ETA-ESTIMATES,
 AND THE P-VALUE IS GIVEN FOR THE NULL HYPOTHESIS THAT THE TRUE MEAN IS 0.

 ETABAR:        -1.1037E+00  0.0000E+00
 SE:             1.2703E-01  0.0000E+00
 N:                      38          38

 P VAL.:         3.7057E-18  1.0000E+00

 ETASHRINKSD(%)  5.2237E+01  0.0000E+00
 ETASHRINKVR(%)  7.7187E+01  0.0000E+00
 EBVSHRINKSD(%)  1.7340E+01  0.0000E+00
 EBVSHRINKVR(%)  3.1673E+01  0.0000E+00
 RELATIVEINF(%)  6.8327E+01  0.0000E+00
 EPSSHRINKSD(%)  1.0000E-10
 EPSSHRINKVR(%)  1.0000E-10


 TOTAL DATA POINTS NORMALLY DISTRIBUTED (N):           38
 N*LOG(2PI) CONSTANT TO OBJECTIVE FUNCTION:    69.839328523555125
 OBJECTIVE FUNCTION VALUE WITHOUT CONSTANT:    1568864489191595.5
 OBJECTIVE FUNCTION VALUE WITH CONSTANT:       1568864489191665.3
 REPORTED OBJECTIVE FUNCTION DOES NOT CONTAIN CONSTANT

 TOTAL EFFECTIVE ETAS (NIND*NETA):                            38


 #TERE:
 Elapsed estimation  time in seconds:     0.04
0R MATRIX ALGORITHMICALLY SINGULAR
 AND ALGORITHMICALLY NON-POSITIVE-SEMIDEFINITE
0R MATRIX IS OUTPUT
0COVARIANCE STEP ABORTED
 Elapsed covariance  time in seconds:     0.04
 Elapsed postprocess time in seconds:     0.00

 ********************               FIRST ORDER CONDITIONAL ESTIMATION WITH INTERACTION              ********************
 #OBJT:**************                       MINIMUM VALUE OF OBJECTIVE FUNCTION                      ********************
 #OBJV:*********************************************************       **************************************************

 ********************               FIRST ORDER CONDITIONAL ESTIMATION WITH INTERACTION              ********************
 ********************                             FINAL PARAMETER ESTIMATE                           ********************

 THETA - VECTOR OF FIXED EFFECTS PARAMETERS   *********
         TH 1      TH 2      TH 3      TH 4
         2.00E-04  4.00E-03  1.00E-06  4.00E-01

 OMEGA - COV MATRIX FOR RANDOM EFFECTS - ETAS  ********
         ETA1      ETA2
 ETA1
+        2.69E+00
 ETA2
+        0.00E+00  0.00E+00

 SIGMA - COV MATRIX FOR RANDOM EFFECTS - EPSILONS  ****
         EPS1
 EPS1
+        1.00E+00

 OMEGA - CORR MATRIX FOR RANDOM EFFECTS - ETAS  *******
         ETA1      ETA2
 ETA1
+        1.64E+00
 ETA2
+        0.00E+00  0.00E+00

 SIGMA - CORR MATRIX FOR RANDOM EFFECTS - EPSILONS  ***
         EPS1
 EPS1
+        1.00E+00
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 Elapsed finaloutput time in seconds:     0.02
 #CPUT: Total CPU Time in Seconds,        0.156
