2024-10-02
오후 06:28
$PROBLEM SB15 VIT AQ FOCE like 2 comp by MID
$INPUT IDD	TIME	AAMT	DV	MDV	LEFT	CMT	SITE	DRUG	DAY	WEEK	BLQ	TYPE	DOSE	GROUP	ROWC	ROWD	ROWNN	NID	ID	LGAMT	LOGDOSE	AMT LNDOSE ROW	;GGROUP
$DATA ..//GC_VROI_1.csv IGNORE=@  IGNORE(SITE.EQ.1) IGNORE(SITE.EQ.5) IGNORE(GROUP.EQ.8)

$SUBROUTINE ADVAN13 TOL=3

$MODEL
  NCOMP=4
  COMP=(VIT)        ; Compartment 1: Vitreous (Dosing compartment)
  COMP=(RET)        ; Compartment 2: Retina
  COMP=(OPT)        ; Compartment 3: Optic Nerve
  COMP=(IRIS)       ; Compartment 4: Iris

$PK
  ; Inter-compartmental clearances and volumes of distribution
  Q12 = THETA(1) * EXP(ETA(1))  ; Clearance between VIT and RET
  Q13 = THETA(2) * EXP(ETA(2))  ; Clearance between VIT and OPT
  Q14 = THETA(3) * EXP(ETA(3))  ; Clearance between VIT and IRIS
  Q41 = THETA(26) * EXP(ETA(12))  ; Clearance between VIT and IRIS
  Q31 = THETA(27) * EXP(ETA(12))  ; Clearance between VIT and IRIS

  ; Volumes of distribution for each compartment
  V1  = THETA(4) * EXP(ETA(4))  ; Volume of distribution for VIT
  V2  = THETA(5) * EXP(ETA(5))  ; Volume of distribution for RET
  V3  = THETA(6) * EXP(ETA(6))  ; Volume of distribution for OPT
  V4  = THETA(7) * EXP(ETA(7))  ; Volume of distribution for IRIS

  ; Clearance for each compartment
  CL1 = THETA(8) * EXP(ETA(8))  ; Clearance from VIT compartment
  CL2 = THETA(9) * EXP(ETA(9))  ; Clearance from RET compartment
  CL3 = THETA(10) * EXP(ETA(10))  ; Clearance from OPT compartment
  CL4 = THETA(11) * EXP(ETA(11))  ; Clearance from IRIS compartment

; Define bioavailability scaling factors for each dose group
IF(GROUP.EQ.2) F1 = THETA(20)
IF(GROUP.EQ.3) F1 = THETA(21)
IF(GROUP.EQ.4) F1 = THETA(22)
IF(GROUP.EQ.5) F1 = THETA(23)
IF(GROUP.EQ.6) F1 = THETA(24)
IF(GROUP.EQ.7) F1 = THETA(25)

  ; Scaling factors for concentrations in each compartment
  S1 = V1/1000  ; Scaling factor for VIT
  S2 = V2/1000  ; Scaling factor for RET
  S3 = V3/1000  ; Scaling factor for OPT
  S4 = V4/1000  ; Scaling factor for IRIS

  ; Rate constants calculated from inter-compartmental clearances and volumes
  K12 = Q12 / V1
  K21 = Q12 / V2
  K13 = Q13 / V1
  K31 = Q31 / V3
  K14 = Q14 / V1
  K41 = Q41 / V4
  K10 = CL1 / V1
  K20 = CL2 / V2
  K30 = CL3 / V3
  K40 = CL4 / V4

$DES
  ; Differential equations for the compartments
  DADT(1) = - (K10 + K12 + K13 + K14) * A(1) + K21 * A(2) + K31 * A(3) + K41 * A(4)  ; VIT compartment
  DADT(2) = K12 * A(1) - (K20 + K21) * A(2)  ; RET compartment
  DADT(3) = K13 * A(1) - (K30 + K31) * A(3)  ; OPT compartment
  DADT(4) = K14 * A(1) - (K40 + K41) * A(4)  ; IRIS compartment

$ERROR
  IF (CMT.EQ.1) THEN
    IPRED  = F                  ; Individual prediction for VIT
    W      = SQRT(THETA(12)**2 + (THETA(13) * IPRED)**2)  ; Combined error for VIT
    IRES   = DV - IPRED         ; Residuals for VIT
    IWRES  = IRES / W           ; Weighted residuals for VIT
    Y      = IPRED + W * EPS(1) ; Observed value for VIT
  ENDIF

  IF (CMT.EQ.2) THEN
    IPRED  = F                  ; Individual prediction for RET
    W      = SQRT(THETA(14)**2 + (THETA(15) * IPRED)**2)  ; Combined error for RET
    IRES   = DV - IPRED         ; Residuals for RET
    IWRES  = IRES / W           ; Weighted residuals for RET
    Y      = IPRED + W * EPS(2) ; Observed value for RET
  ENDIF

  IF (CMT.EQ.3) THEN
    IPRED  = F                  ; Individual prediction for OPT
    W      = SQRT(THETA(16)**2 + (THETA(17) * IPRED)**2)  ; Combined error for OPT
    IRES   = DV - IPRED         ; Residuals for OPT
    IWRES  = IRES / W           ; Weighted residuals for OPT
    Y      = IPRED + W * EPS(3) ; Observed value for OPT
  ENDIF

  IF (CMT.EQ.4) THEN
    IPRED  = F                  ; Individual prediction for IRIS
    W      = SQRT(THETA(18)**2 + (THETA(19) * IPRED)**2)  ; Combined error for IRIS
    IRES   = DV - IPRED         ; Residuals for IRIS
    IWRES  = IRES / W           ; Weighted residuals for IRIS
    Y      = IPRED + W * EPS(4) ; Observed value for IRIS
  ENDIF

$THETA

(0, 0.00001);Q12
(0, 0.00001);Q13
(0, 0.00001);Q14

0.0015    FIX ;V1 VIT VAROIS_19
0.0000686 FIX ;V2 RET VAROIS_19
0.0002    FIX ;V3 OPT VAROIS_19
0.0000108 FIX ;V4 IRIS VAROIS_19 Est.

(0, 0.00001) ;CL1
(0, 0.000001) ;CL2
(0, 0.0001) ;CL3
(0, 0.0001) ;CL4

 0.0001 FIX  ;add
 (0, 0.3)    ;prop
 0.0001 FIX  ;add
 (0, 0.3)    ;prop
 0.0001 FIX  ;add
 (0, 0.3)    ;prop
 0.0001 FIX  ;add
 (0, 0.3)    ;prop


 (0,0.1,1)   ;F1 20
 (0,0.1,1)
 (0,0.1,1)
 (0,0.7)
 (0,0.7)
 (0,0.7)

(0, 0.00001) ;Q41 26
(0, 0.00001) ;Q31 27

;1 no SF
;2 22241 S
;1.06E-05  8.59E-06  1.50E-05' 1.50E-03  6.86E-05  2.00E-04  1.08E-05'  9.30E-06  3.11E-05  4.72E-05  3.07E-06  1.00E-04
;         1.85E+01  1.00E-04  1.97E+00  1.00E-04  1.22E+00  1.00E-04  9.80E-01
;3 20293 t overestimation
;1.00E-10  1.00E-10  4.74E-09  1.50E-03  6.86E-05  2.00E-04  1.08E-05  1.95E-05  1.04E-06  4.70E-06  1.73E-05  1.00E-04
;          9.89E-01  1.00E-04  1.33E+00  1.00E-04  5.13E+00  1.00E-04  1.41E+00

;4 T 13907 LNAMT => AMT BETTER BUT SITE 2,3 UNDER PRED
;1.00E-07  1.00E-07  1.00E-07  1.50E-03  6.86E-05  2.00E-04  1.08E-05  3.84E-06  5.85E-04  7.37E-04  1.28E-05  1.00E-04
;          1.71E+00  1.00E-04  7.89E+02  1.00E-04  6.49E+01  1.00E-04  4.33E+01
;IGNORE GROUP8
;5 S 11795 SITE 2 UNDERPRED <- Q12 LARGER, CL20 SMALLER
;1.77E-06  5.19E-07  1.10E-07  1.50E-03  6.86E-05  2.00E-04  1.08E-05  1.96E-06  1.45E-01  1.63E-04  5.58E-05  1.00E-04
;          1.68E+00  1.00E-04  1.20E+04  1.00E-04  2.84E+00  1.00E-04  4.67E+01
;6 t large SITE 1,4 UNDEREST
;1.00E-07  1.00E-07  4.65E+06  1.50E-03  6.86E-05  2.00E-04  1.08E-05  3.35E-05  5.94E-08  1.00E-06  4.57E-06  1.00E-04
;          4.79E+05  1.00E-04  3.00E-03  1.00E-04  1.54E+05  1.00E-04  9.10E+05

;7 t 11715 EPSILON ALL SITE1 LOW DOSE OVEREST
;1.12E-06  1.53E-06  1.41E-06  1.50E-03  6.86E-05  2.00E-04  1.08E-05  4.05E-07  1.23E-05  8.02E-04  3.34E-05  1.00E-04
;          3.00E-03  1.00E-04  1.24E+00  1.00E-04  2.68E+00  1.00E-04  8.21E-01

;8 t 11385 RELATIVE F1 PER DOSE <= BEST SO FAR
;5.89E-06  1.46E-06  1.01E-06  1.50E-03  6.86E-05  2.00E-04  1.08E-05  1.00E-07  2.27E-06  1.08E-04  8.09E-05  1.00E-04
;          3.00E-03  1.00E-04  3.00E-03  1.00E-04  3.11E+03  1.00E-04  1.56E+04  3.96E-02  6.78E-02  1.15E-01  8.47E-02  2.43E-01
;         2.34E-01

;9 t 20771 F1 ~ f(DOSE) NOT WORKING -> FIX  <= all off
; 7.18E-06  1.71E-05  6.50E-06  1.50E-03  6.86E-05  2.00E-04  1.08E-05  8.70E-06  4.34E-06  8.08E-05  1.34E-04  1.00E-04
;          5.25E+09  1.00E-04  3.13E+07  1.00E-04  4.96E+12  1.00E-04  8.70E+12  3.43E-02  6.00E-01
;9 T 12805
; 4.96E-06  1.64E-05  7.89E-06  1.50E-03  6.86E-05  2.00E-04  1.08E-05  4.85E-06  5.73E-06  1.00E-06  1.00E-06  1.00E-04
;          1.52E+00  1.00E-04  2.40E+03  1.00E-04  1.46E+00  1.00E-04  3.00E-03  9.93E-02 -9.53E-01

;8 exp => F1 by SITE
;10 F1 ~ f(SITE) SC3,SC4 t 11385 does not work

;11 k13~f(DOSE) SS11284 <=
;1.69E-02  2.02E-06  1.70E-06  1.50E-03  6.86E-05  2.00E-04  1.08E-05  5.02E-07  1.10E-07  6.54E-05  6.35E-05  1.00E-04
;          3.76E+00  1.00E-04  1.10E+00  1.00E-04  2.38E+00  1.00E-04  6.17E+00  2.95E-02  5.76E-02  1.17E-01  4.99E-02  1.51E-01
;         8.42E-02  2.32E-06  3.43E-06  1.50E-06  1.61E-06  3.15E-07

;12  k14~f(DOSE) t11198
; 4.86E-06  1.89E-06  4.10E-07  1.50E-03  6.86E-05  2.00E-04  1.08E-05  1.00E-07  9.68E-07  3.03E-05  3.14E-04  1.00E-04
;          3.18E+03  1.00E-04  1.11E+00  1.00E-04  3.00E-03  1.00E-04  1.27E+01  2.07E-02  4.63E-02  1.23E-01  9.95E-01  1.59E-01
;         1.45E-01  2.13E-06  3.47E-06  1.63E-07  1.86E-06  3.60E-07  7.87E-07  1.23E-06  6.13E-06  5.02E-07  3.32E-06

;13 t 11372 8 based. q14~f(DOSE) t11503 => totla off..
;4.54E-03  8.87E-04  1.43E-07  1.50E-03  6.86E-05  2.00E-04  1.08E-05  1.16E-06  2.14E-06  1.00E-06  8.56E-05  1.00E-04
;           3.00E-03  1.00E-04  3.00E-03  1.00E-04  3.00E-03  1.00E-04  1.89E+06  1.00E-03  1.00E-03  1.00E-03  5.00E-03  5.00E-03
;          5.00E-03  4.27E-07  6.47E-07  2.23E-06  2.08E-07  2.76E-06

;80 8 based. G5,6,7 F1 high est
; 2.09E-04  2.19E-06  7.41E-06  1.50E-03  6.86E-05  2.00E-04  1.08E-05  3.64E-07  8.20E-07  2.11E-05  1.00E-06  1.00E-04
;          6.69E+00  1.00E-04  1.52E+00  1.00E-04  1.83E+00  1.00E-04  1.31E+00  1.30E-02  2.45E-02  3.82E-02  3.09E-02  9.07E-02
;         7.32E-02
;
;70 t11794 sep Q14 Q41
; 1.69E-06  1.43E-06  5.81E-07  1.50E-03  6.86E-05  2.00E-04  1.08E-05  1.10E-06  7.47E-04  2.88E-04  1.50E-03  1.00E-04
;          7.85E+02  1.00E-04  4.06E+01  1.00E-04  1.70E+00  1.00E-04  2.11E+01  1.08E-03
; 2.02E-06  1.07E-06  7.28E-06  1.50E-03  6.86E-05  2.00E-04  1.08E-05  1.00E-07  1.81E-05  2.50E-04  4.28E-05  1.00E-04
;          1.53E+00  1.00E-04  1.22E+00  1.00E-04  1.76E+00  1.00E-04  1.33E+03  1.94E-04

;81 t 11374 70 based. sep Q14 Q41 F1 by DOSE
;1.37E-05  1.57E-06  1.98E-06  1.50E-03  6.86E-05  2.00E-04  1.08E-05  6.41E-07  8.06E-08  5.64E-05  8.28E-05  1.00E-04
;          3.68E+00  1.00E-04  1.11E+00  1.00E-04  2.61E+00  1.00E-04  5.96E+00  2.55E-02  4.70E-02  7.07E-02  5.85E-02  1.68E-01
;         1.61E-01  1.00E-04

;82 t 11802 G5, G6 HIGH F1 0.2 FIX => not reflected..
;1.28E-05  1.96E-06  2.40E-06  1.50E-03  6.86E-05  2.00E-04  1.08E-05  2.58E-06  1.00E-08  5.21E-05  4.29E-05  1.00E-04
;          3.00E-03  1.00E-04  3.57E-03  1.00E-04  3.01E+00  1.00E-04  3.97E-03  4.84E-02  6.91E-02  9.91E-01  2.00E-01  2.00E-01
;         2.00E-01  9.80E-04

;83 t 11335 81.based sep Q13 Q31 <= best
;8.39E-07  2.30E-06  1.92E-06  1.50E-03  6.86E-05  2.00E-04  1.08E-05  4.34E-07  3.99E-06  1.05E-04  9.70E-05  1.00E-04
;          1.64E+00  1.00E-04  1.15E+00  1.00E-04  1.82E+00  1.00E-04  3.54E+00  9.59E-02  1.94E-01  2.91E-01  2.38E-01  6.87E-01
;         5.53E-01  3.87E-05  9.56E-05

;830 param FIX and sim, F1 by DOSE
;not really working need simulation in order to check.

$OMEGA
  0 FIX ;Q12
  0 FIX ;Q13
  0 FIX ;Q14

  0 FIX ;V1
  0 FIX ;V2
  0 FIX ;V3
  0 FIX ;V4

  0 FIX ;CL1
  0 FIX ;CL2
  0 FIX ;CL3
  0 FIX ;CL4

  0 FIX ;Q41

$SIGMA
  0.04;
  0.04;
  0.04;
  0.04;

$ESTIMATION  MAXEVAL=9999 PRINT=10 SIGDIGITS=2  METHOD=1 INTER ;METHOD=0 ;
;$COVARIANCE PRINT=E

$TABLE ID	TIME	AMT	DV	MDV	LEFT	CMT	SITE	DRUG	DAY	WEEK	BLQ	TYPE	DOSE	GROUP	ROWC	ROWD	ROWNN	NID	IDD	LGAMT	LOGDOSE	LNDOSE ROW PRED IPRED CWRES IWRES     ONEHEADER NOPRINT FILE = sdtab831
$TABLE ID CL1 CL2 CL3 CL4 Q12 Q13 Q14 V1 V2 V3 V4 F1 MDV DOSE GROUP TYPE CMT                                                                           ONEHEADER NOPRINT NOAPPEND FILE = patab831

;$TABLE ID TIME PRED AMT DV MDV EVID LEFT	SITE	DRUG	DAY	WEEK	BLQ	TYPE	NID DOSE ROWNN IPRED CWRES IWRES             ONEHEADER NOPRINT FILE = sdtab11
;GROUP=drop	IDD	TIME	AMT	DV	MDV	LEFT	SITE	DRUG	DAY	WEEK	BLQ	TYPE	NID	ID	DOSE	ROWC	ROWD	ROWNN

;$TABLE ID TIME PRED AMT DV MDV ODV EVID PTIME	TAD PTAD DAY	SEX	AGE	HT	WT	BMI	NUM	DRUG BASE IPRED CWRES IWRES             ONEHEADER NOPRINT FILE = sdtab635
;$TABLE ID CL V KA ETA(1) ETA(2) ETA(3)                                                                             ONEHEADER NOPRINT NOAPPEND FILE = patab635
;$TABLE ID SEX DRUG                                                                                                 ONEHEADER NOPRINT NOAPPEND FILE = catab635
;$TABLE ID AGE HT WT BMI                                                                                            ONEHEADER NOPRINT NOAPPEND FILE = cotab635
;$TABLE ID CL V KA ETA(1) ETA(2) ETA(3) SEX DRUG AGE HT WT BMI                                                     ONEHEADER NOPRINT NOAPPEND FILE = alltab635

NM-TRAN MESSAGES
 WARNINGS AND ERRORS (IF ANY) FOR PROBLEM    1
 (WARNING  2) NM-TRAN INFERS THAT THE DATA ARE POPULATION.
 (WARNING  3) THERE MAY BE AN ERROR IN THE ABBREVIATED CODE. THE FOLLOWING
 ONE OR MORE RANDOM VARIABLES ARE DEFINED WITH "IF" STATEMENTS THAT DO NOT
 PROVIDE DEFINITIONS FOR BOTH THE "THEN" AND "ELSE" CASES. IF ALL
 CONDITIONS FAIL, THE VALUES OF THESE VARIABLES WILL BE ZERO.
   IPRED W IRES IWRES Y
 LIM VALUES MAXLIM ASSESSED BY NMTRAN: 1,2,3,4,5,6,7,8,10,11,13,15,16
Note: Analytical 2nd Derivatives are constructed in FSUBS but are never used.
      You may insert $ABBR DERIV2=NO after the first $PROB to save FSUBS construction and compilation time

1NONLINEAR MIXED EFFECTS MODEL PROGRAM (NONMEM) VERSION 7.5.1
 ORIGINALLY DEVELOPED BY STUART BEAL, LEWIS SHEINER, AND ALISON BOECKMANN
 CURRENT DEVELOPERS ARE ROBERT BAUER, ICON DEVELOPMENT SOLUTIONS,
 AND ALISON BOECKMANN. IMPLEMENTATION, EFFICIENCY, AND STANDARDIZATION
 PERFORMED BY NOUS INFOSYSTEMS.
 PROBLEM NO.:         1
 SB15 VIT AQ FOCE like 2 comp by MID
 TOT. NO. OF OBS RECS:      480
 TOT. NO. OF INDIVIDUALS:      144
 GENERAL NONLINEAR KINETICS MODEL WITH STIFF/NONSTIFF EQUATIONS (LSODA, ADVAN13)
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 #TBLN:      1
 #METH: First Order Conditional Estimation with Interaction
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
0PRED EXIT CODE = 1
0INDIVIDUAL NO.      14   ID= 1.20710000000000E+04   (WITHIN-INDIVIDUAL) DATA REC NO.   1
 THETA=
  8.39E-07   2.30E-06   1.92E-06   1.50E-03   6.86E-05   2.00E-04   1.08E-05   1.00E-04   1.64E+00   1.05E-04
  9.70E-05   1.00E-04   1.96E-01   1.00E-04   3.00E-01   1.00E-04   3.06E-01   1.00E-04   3.02E-01   5.92E-02
 -1.55E+00   3.87E-05   9.56E-05
 PK PARAMETER FOR BIOAVAILABILITY FRACTION IS NEGATIVE
0PROGRAM TERMINATED BY OBJ
 MESSAGE ISSUED FROM ESTIMATION STEP
 ADDITIONAL ERRORS ARE LISTED IN PRDERR

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
 #TERM:
0MINIMIZATION TERMINATED
 DUE TO ROUNDING ERRORS (ERROR=134)
 NO. OF FUNCTION EVALUATIONS USED:     3113
 NO. OF SIG. DIGITS UNREPORTABLE

 ETABAR IS THE ARITHMETIC MEAN OF THE ETA-ESTIMATES,
 AND THE P-VALUE IS GIVEN FOR THE NULL HYPOTHESIS THAT THE TRUE MEAN IS 0.

 ETABAR:         0.0000E+00  0.0000E+00  0.0000E+00  0.0000E+00  0.0000E+00  0.0000E+00  0.0000E+00  0.0000E+00  0.0000E+00  0.0000E+00
                 0.0000E+00  0.0000E+00
 SE:             0.0000E+00  0.0000E+00  0.0000E+00  0.0000E+00  0.0000E+00  0.0000E+00  0.0000E+00  0.0000E+00  0.0000E+00  0.0000E+00
                 0.0000E+00  0.0000E+00
 N:                     130         130         130         130         130         130         130         130         130         130
                        130         130

 P VAL.:         1.0000E+00  1.0000E+00  1.0000E+00  1.0000E+00  1.0000E+00  1.0000E+00  1.0000E+00  1.0000E+00  1.0000E+00  1.0000E+00
                 1.0000E+00  1.0000E+00

 ETASHRINKSD(%)  0.0000E+00  0.0000E+00  0.0000E+00  0.0000E+00  0.0000E+00  0.0000E+00  0.0000E+00  0.0000E+00  0.0000E+00  0.0000E+00
                 0.0000E+00  0.0000E+00
 ETASHRINKVR(%)  0.0000E+00  0.0000E+00  0.0000E+00  0.0000E+00  0.0000E+00  0.0000E+00  0.0000E+00  0.0000E+00  0.0000E+00  0.0000E+00
                 0.0000E+00  0.0000E+00
 EBVSHRINKSD(%)  0.0000E+00  0.0000E+00  0.0000E+00  0.0000E+00  0.0000E+00  0.0000E+00  0.0000E+00  0.0000E+00  0.0000E+00  0.0000E+00
                 0.0000E+00  0.0000E+00
 EBVSHRINKVR(%)  0.0000E+00  0.0000E+00  0.0000E+00  0.0000E+00  0.0000E+00  0.0000E+00  0.0000E+00  0.0000E+00  0.0000E+00  0.0000E+00
                 0.0000E+00  0.0000E+00
 RELATIVEINF(%)  0.0000E+00  0.0000E+00  0.0000E+00  0.0000E+00  0.0000E+00  0.0000E+00  0.0000E+00  0.0000E+00  0.0000E+00  0.0000E+00
                 0.0000E+00  0.0000E+00
 EPSSHRINKSD(%)  1.0000E-10  1.0000E-10  1.0000E-10  1.0000E-10
 EPSSHRINKVR(%)  1.0000E-10  1.0000E-10  1.0000E-10  1.0000E-10


 TOTAL DATA POINTS NORMALLY DISTRIBUTED (N):          576
 N*LOG(2PI) CONSTANT TO OBJECTIVE FUNCTION:    1058.6171902517829
 OBJECTIVE FUNCTION VALUE WITHOUT CONSTANT:    11335.686171922276
 OBJECTIVE FUNCTION VALUE WITH CONSTANT:       12394.303362174060
 REPORTED OBJECTIVE FUNCTION DOES NOT CONTAIN CONSTANT

 TOTAL EFFECTIVE ETAS (NIND*NETA):                             0


 #TERE:
 Elapsed estimation  time in seconds:    28.93

0PRED EXIT CODE = 1
0INDIVIDUAL NO.      14   ID= 1.20710000000000E+04   (WITHIN-INDIVIDUAL) DATA REC NO.   1
 THETA=
  8.39E-07   2.30E-06   1.92E-06   1.50E-03   6.86E-05   2.00E-04   1.08E-05   1.00E-04   1.64E+00   1.05E-04
  9.70E-05   1.00E-04   1.96E-01   1.00E-04   3.00E-01   1.00E-04   3.06E-01   1.00E-04   3.02E-01   5.92E-02
 -1.55E+00   3.87E-05   9.56E-05
 PK PARAMETER FOR BIOAVAILABILITY FRACTION IS NEGATIVE
0PROGRAM TERMINATED BY OBJ
 MESSAGE ISSUED FROM ESTIMATION STEP
 ADDITIONAL ERRORS ARE LISTED IN PRDERR

0PRED EXIT CODE = 1
0INDIVIDUAL NO.      14   ID= 1.20710000000000E+04   (WITHIN-INDIVIDUAL) DATA REC NO.   1
 THETA=
  8.39E-07   2.30E-06   1.92E-06   1.50E-03   6.86E-05   2.00E-04   1.08E-05   1.00E-04   1.64E+00   1.05E-04
  9.70E-05   1.00E-04   1.96E-01   1.00E-04   3.00E-01   1.00E-04   3.06E-01   1.00E-04   3.02E-01   5.92E-02
 -1.55E+00   3.87E-05   9.56E-05
 PK PARAMETER FOR BIOAVAILABILITY FRACTION IS NEGATIVE
0PROGRAM TERMINATED BY OBJ
 MESSAGE ISSUED FROM ESTIMATION STEP
 ADDITIONAL ERRORS ARE LISTED IN PRDERR
 Elapsed postprocess time in seconds:     0.09

 ********************               FIRST ORDER CONDITIONAL ESTIMATION WITH INTERACTION              ********************
 #OBJT:**************                       MINIMUM VALUE OF OBJECTIVE FUNCTION                      ********************
 #OBJV:********************************************    11335.686       **************************************************

 ********************               FIRST ORDER CONDITIONAL ESTIMATION WITH INTERACTION              ********************
 ********************                             FINAL PARAMETER ESTIMATE                           ********************

 THETA - VECTOR OF FIXED EFFECTS PARAMETERS   *********
         TH 1      TH 2      TH 3      TH 4      TH 5      TH 6      TH 7      TH 8      TH 9      TH10      TH11      TH12
          TH13      TH14      TH15      TH16      TH17      TH18      TH19      TH20      TH21      TH22      TH23      TH24
         TH25      TH26      TH27
         8.39E-07  2.30E-06  1.92E-06  1.50E-03  6.86E-05  2.00E-04  1.08E-05  4.34E-07  3.99E-06  1.05E-04  9.70E-05  1.00E-04
          1.64E+00  1.00E-04  1.15E+00  1.00E-04  1.82E+00  1.00E-04  3.54E+00  9.59E-02  1.94E-01  2.91E-01  2.38E-01  6.87E-01
         5.53E-01  3.87E-05  9.56E-05

 OMEGA - COV MATRIX FOR RANDOM EFFECTS - ETAS  ********
         ETA1      ETA2      ETA3      ETA4      ETA5      ETA6      ETA7      ETA8      ETA9      ET10      ET11      ET12
 ETA1
+        0.00E+00
 ETA2
+        0.00E+00  0.00E+00
 ETA3
+        0.00E+00  0.00E+00  0.00E+00
 ETA4
+        0.00E+00  0.00E+00  0.00E+00  0.00E+00
 ETA5
+        0.00E+00  0.00E+00  0.00E+00  0.00E+00  0.00E+00
 ETA6
+        0.00E+00  0.00E+00  0.00E+00  0.00E+00  0.00E+00  0.00E+00
 ETA7
+        0.00E+00  0.00E+00  0.00E+00  0.00E+00  0.00E+00  0.00E+00  0.00E+00
 ETA8
+        0.00E+00  0.00E+00  0.00E+00  0.00E+00  0.00E+00  0.00E+00  0.00E+00  0.00E+00
 ETA9
+        0.00E+00  0.00E+00  0.00E+00  0.00E+00  0.00E+00  0.00E+00  0.00E+00  0.00E+00  0.00E+00
 ET10
+        0.00E+00  0.00E+00  0.00E+00  0.00E+00  0.00E+00  0.00E+00  0.00E+00  0.00E+00  0.00E+00  0.00E+00
 ET11
+        0.00E+00  0.00E+00  0.00E+00  0.00E+00  0.00E+00  0.00E+00  0.00E+00  0.00E+00  0.00E+00  0.00E+00  0.00E+00
 ET12
+        0.00E+00  0.00E+00  0.00E+00  0.00E+00  0.00E+00  0.00E+00  0.00E+00  0.00E+00  0.00E+00  0.00E+00  0.00E+00  0.00E+00

 SIGMA - COV MATRIX FOR RANDOM EFFECTS - EPSILONS  ****
         EPS1      EPS2      EPS3      EPS4
 EPS1
+        1.62E+00
 EPS2
+        0.00E+00  5.88E-01
 EPS3
+        0.00E+00  0.00E+00  1.47E+00
 EPS4
+        0.00E+00  0.00E+00  0.00E+00  5.57E+00

 OMEGA - CORR MATRIX FOR RANDOM EFFECTS - ETAS  *******
         ETA1      ETA2      ETA3      ETA4      ETA5      ETA6      ETA7      ETA8      ETA9      ET10      ET11      ET12
 ETA1
+        0.00E+00
 ETA2
+        0.00E+00  0.00E+00
 ETA3
+        0.00E+00  0.00E+00  0.00E+00
 ETA4
+        0.00E+00  0.00E+00  0.00E+00  0.00E+00
 ETA5
+        0.00E+00  0.00E+00  0.00E+00  0.00E+00  0.00E+00
 ETA6
+        0.00E+00  0.00E+00  0.00E+00  0.00E+00  0.00E+00  0.00E+00
 ETA7
+        0.00E+00  0.00E+00  0.00E+00  0.00E+00  0.00E+00  0.00E+00  0.00E+00
 ETA8
+        0.00E+00  0.00E+00  0.00E+00  0.00E+00  0.00E+00  0.00E+00  0.00E+00  0.00E+00
 ETA9
+        0.00E+00  0.00E+00  0.00E+00  0.00E+00  0.00E+00  0.00E+00  0.00E+00  0.00E+00  0.00E+00
 ET10
+        0.00E+00  0.00E+00  0.00E+00  0.00E+00  0.00E+00  0.00E+00  0.00E+00  0.00E+00  0.00E+00  0.00E+00
 ET11
+        0.00E+00  0.00E+00  0.00E+00  0.00E+00  0.00E+00  0.00E+00  0.00E+00  0.00E+00  0.00E+00  0.00E+00  0.00E+00
 ET12
+        0.00E+00  0.00E+00  0.00E+00  0.00E+00  0.00E+00  0.00E+00  0.00E+00  0.00E+00  0.00E+00  0.00E+00  0.00E+00  0.00E+00

 SIGMA - CORR MATRIX FOR RANDOM EFFECTS - EPSILONS  ***
         EPS1      EPS2      EPS3      EPS4
 EPS1
+        1.27E+00
 EPS2
+        0.00E+00  7.67E-01
 EPS3
+        0.00E+00  0.00E+00  1.21E+00
 EPS4
+        0.00E+00  0.00E+00  0.00E+00  2.36E+00
 Elapsed finaloutput time in seconds:     0.14
 #CPUT: Total CPU Time in Seconds,       20.906
