2024-10-15
오후 04:20
;; 1. Based on: run25
;; 2. Description: SCM FINAL
;; x1. Author: user
;; 1. Base model
$PROBLEM    SELINEXOR 2 compt with RATE
$DATA      SEL.csv IGNORE=#
$INPUT      ID TIME AMT RATE DV TYPE MDV AGE SEX WT HT SCR GFR ALB AST
            ALT WBC ALC ANC PLT HB CRP LDH PTN IGG IGA IGM IGD IGE
$SUBROUTINE ADVAN4 TRANS4
$PK
;;; CLPTN-DEFINITION START
IF(PTN.LE.6.50) CLPTN = ( 1 + THETA(7)*(PTN - 6.5))
IF(PTN.GT.6.50) CLPTN = ( 1 + THETA(8)*(PTN - 6.5))
;;; CLPTN-DEFINITION END

;;; CL-RELATION START
CLCOV=CLPTN
;;; CL-RELATION END

  TVCL = THETA(1)* (WT/63.3)**0.75  ; L/hr

TVCL = CLCOV*TVCL
  TVV2 = THETA(2) * (WT/63.3)**1 ; L
  TVQ  = THETA(3)  ; L/hr
  TVV3 = THETA(4) * (WT/63.3)**1  ; V2with allometry ; L
  TVKA = THETA(5)  ; 1/hr
  ALAG1 =THETA(6)

  CL = TVCL * EXP(ETA(1))
  V2 = TVV2 * EXP(ETA(2))
  Q = TVQ * EXP(ETA(3))
  V3= TVV3 * EXP(ETA(4))
  KA = TVKA * EXP(ETA(5))

  S2 = V2 / 1000

$ERROR
  IPRED = F
  IRES = DV - IPRED
  IWRES = IRES / IPRED
  Y = F * (1 + EPS(1)) + EPS(2)

$THETA  (0,17) ; CL
 (0,93) ; V2 (CENTRAL)
 (0,4.6) ; Q
 (0,32.5) ; V3  (PERIPHERAL)
 (0,1.39) ; KA
 (0,1.29) ; ALAG1
 0.47 FIX ; CLPTN1
 -0.0138 FIX ; CLPTN2
$OMEGA  BLOCK(2)
 0.0167  ;        CL_
 0.025 0.07  ;         V2
$OMEGA  0  FIX  ;         Q_
 0  FIX  ;         V3
 0.5  ;        KA_
$SIGMA  0.0186296  ;       ERR1
 0  FIX  ;       ERR2
$COVARIANCE PRINT=E UNCONDITIONAL
$COVARIANCE PRINT=E UNCONDITIONAL
$ESTIMATION NOABORT NOOBT NOSBT NOTBT MAXEVAL=9999 METHOD=1 INTER
            SIGDIGITS=3
$TABLE      ID AMT TIME DV MDV IPRED PRED CWRES IWRES ONEHEADER
            NOPRINT FILE=sdtab0033
$TABLE      ID AMT TIME DV CL V2 V3 Q ETA(1) ETA(2) ETA(3) ETA(4)
            ETA(5) CWRES IWRES ONEHEADER NOPRINT NOAPPEND
            FILE=patab0033
$TABLE      ID SEX ONEHEADER NOPRINT NOAPPEND FILE=Catab0033
$TABLE      ID WT SCR ONEHEADER NOPRINT NOAPPEND FILE=Cotab0033

NM-TRAN MESSAGES
 WARNINGS AND ERRORS (IF ANY) FOR PROBLEM    1
 (WARNING  2) NM-TRAN INFERS THAT THE DATA ARE POPULATION.
Note: Analytical 2nd Derivatives are constructed in FSUBS but are never used.
      You may insert $ABBR DERIV2=NO after the first $PROB to save FSUBS construction and compilation time

1NONLINEAR MIXED EFFECTS MODEL PROGRAM (NONMEM) VERSION 7.5.1
 ORIGINALLY DEVELOPED BY STUART BEAL, LEWIS SHEINER, AND ALISON BOECKMANN
 CURRENT DEVELOPERS ARE ROBERT BAUER, ICON DEVELOPMENT SOLUTIONS,
 AND ALISON BOECKMANN. IMPLEMENTATION, EFFICIENCY, AND STANDARDIZATION
 PERFORMED BY NOUS INFOSYSTEMS.
 PROBLEM NO.:         1
 SELINEXOR 2 compt with RATE
 TOT. NO. OF OBS RECS:       60
 TOT. NO. OF INDIVIDUALS:       12
 TWO COMPARTMENT MODEL WITH FIRST-ORDER ABSORPTION (ADVAN4)
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 #TBLN:      1
 #METH: First Order Conditional Estimation with Interaction
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
 #TERM:
0MINIMIZATION SUCCESSFUL
 NO. OF FUNCTION EVALUATIONS USED:      253
 NO. OF SIG. DIGITS IN FINAL EST.:  4.9

 ETABAR IS THE ARITHMETIC MEAN OF THE ETA-ESTIMATES,
 AND THE P-VALUE IS GIVEN FOR THE NULL HYPOTHESIS THAT THE TRUE MEAN IS 0.

 ETABAR:        -7.1622E-04 -6.2417E-03  0.0000E+00  0.0000E+00 -2.4175E-02
 SE:             3.3397E-02  6.4521E-02  0.0000E+00  0.0000E+00  1.8870E-01
 N:                      12          12          12          12          12

 P VAL.:         9.8289E-01  9.2293E-01  1.0000E+00  1.0000E+00  8.9806E-01

 ETASHRINKSD(%)  1.0502E+01  1.4165E+01  0.0000E+00  0.0000E+00  8.9686E+00
 ETASHRINKVR(%)  1.9902E+01  2.6323E+01  0.0000E+00  0.0000E+00  1.7133E+01
 EBVSHRINKSD(%)  1.0464E+01  1.4397E+01  0.0000E+00  0.0000E+00  6.8130E+00
 EBVSHRINKVR(%)  1.9832E+01  2.6722E+01  0.0000E+00  0.0000E+00  1.3162E+01
 RELATIVEINF(%)  7.9975E+01  6.1818E+01  0.0000E+00  0.0000E+00  8.4140E+01
 EPSSHRINKSD(%)  2.4972E+01  1.0000E+02
 EPSSHRINKVR(%)  4.3708E+01  1.0000E+02


 TOTAL DATA POINTS NORMALLY DISTRIBUTED (N):           60
 N*LOG(2PI) CONSTANT TO OBJECTIVE FUNCTION:    110.27262398456072
 OBJECTIVE FUNCTION VALUE WITHOUT CONSTANT:    528.07335018301194
 OBJECTIVE FUNCTION VALUE WITH CONSTANT:       638.34597416757265
 REPORTED OBJECTIVE FUNCTION DOES NOT CONTAIN CONSTANT

 TOTAL EFFECTIVE ETAS (NIND*NETA):                            36


 #TERE:
 Elapsed estimation  time in seconds:     0.23
 Elapsed covariance  time in seconds:     0.29
 Elapsed postprocess time in seconds:     0.01

 ********************               FIRST ORDER CONDITIONAL ESTIMATION WITH INTERACTION              ********************
 #OBJT:**************                       MINIMUM VALUE OF OBJECTIVE FUNCTION                      ********************
 #OBJV:********************************************      528.073       **************************************************

 ********************               FIRST ORDER CONDITIONAL ESTIMATION WITH INTERACTION              ********************
 ********************                             FINAL PARAMETER ESTIMATE                           ********************

 THETA - VECTOR OF FIXED EFFECTS PARAMETERS   *********
         TH 1      TH 2      TH 3      TH 4      TH 5      TH 6      TH 7      TH 8
         1.66E+01  9.29E+01  4.59E+00  3.24E+01  1.39E+00  1.29E+00  4.70E-01 -1.38E-02

 OMEGA - COV MATRIX FOR RANDOM EFFECTS - ETAS  ********
         ETA1      ETA2      ETA3      ETA4      ETA5
 ETA1
+        1.67E-02
 ETA2
+        2.48E-02  6.78E-02
 ETA3
+        0.00E+00  0.00E+00  0.00E+00
 ETA4
+        0.00E+00  0.00E+00  0.00E+00  0.00E+00
 ETA5
+        0.00E+00  0.00E+00  0.00E+00  0.00E+00  5.16E-01

 SIGMA - COV MATRIX FOR RANDOM EFFECTS - EPSILONS  ****
         EPS1      EPS2
 EPS1
+        1.86E-02
 EPS2
+        0.00E+00  0.00E+00

 OMEGA - CORR MATRIX FOR RANDOM EFFECTS - ETAS  *******
         ETA1      ETA2      ETA3      ETA4      ETA5
 ETA1
+        1.29E-01
 ETA2
+        7.38E-01  2.60E-01
 ETA3
+        0.00E+00  0.00E+00  0.00E+00
 ETA4
+        0.00E+00  0.00E+00  0.00E+00  0.00E+00
 ETA5
+        0.00E+00  0.00E+00  0.00E+00  0.00E+00  7.18E-01

 SIGMA - CORR MATRIX FOR RANDOM EFFECTS - EPSILONS  ***
         EPS1      EPS2
 EPS1
+        1.37E-01
 EPS2
+        0.00E+00  0.00E+00

 ********************               FIRST ORDER CONDITIONAL ESTIMATION WITH INTERACTION              ********************
 ********************                            STANDARD ERROR OF ESTIMATE                          ********************

 THETA - VECTOR OF FIXED EFFECTS PARAMETERS   *********
         TH 1      TH 2      TH 3      TH 4      TH 5      TH 6      TH 7      TH 8
         8.32E-01  5.83E+00  1.50E+00  7.05E+00  5.47E-01  1.82E-01 ......... .........

 OMEGA - COV MATRIX FOR RANDOM EFFECTS - ETAS  ********
         ETA1      ETA2      ETA3      ETA4      ETA5
 ETA1
+        3.87E-03
 ETA2
+        1.34E-02  2.80E-02
 ETA3
+       ......... ......... .........
 ETA4
+       ......... ......... ......... .........
 ETA5
+       ......... ......... ......... .........  2.15E-01

 SIGMA - COV MATRIX FOR RANDOM EFFECTS - EPSILONS  ****
         EPS1      EPS2
 EPS1
+        5.08E-03
 EPS2
+       ......... .........

 OMEGA - CORR MATRIX FOR RANDOM EFFECTS - ETAS  *******
         ETA1      ETA2      ETA3      ETA4      ETA5
 ETA1
+        1.50E-02
 ETA2
+        2.37E-01  5.38E-02
 ETA3
+       ......... ......... .........
 ETA4
+       ......... ......... ......... .........
 ETA5
+       ......... ......... ......... .........  1.50E-01

 SIGMA - CORR MATRIX FOR RANDOM EFFECTS - EPSILONS  ***
         EPS1      EPS2
 EPS1
+        1.86E-02
 EPS2
+       ......... .........
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
 ********************               FIRST ORDER CONDITIONAL ESTIMATION WITH INTERACTION              ********************
 ********************                      EIGENVALUES OF COR MATRIX OF ESTIMATE                     ********************

             1         2         3         4         5         6         7         8         9        10        11
         3.32E-05  3.46E-03  2.97E-02  8.04E-02  2.39E-01  5.28E-01  7.18E-01  8.59E-01  2.00E+00  2.73E+00  3.81E+00
 Elapsed finaloutput time in seconds:     0.06
 #CPUT: Total CPU Time in Seconds,        0.375
